New "Spectrum.default" NumHarm=7 harmonic=(1, 3, 5, 7, 9, 11, 13, ) %mag=(100, 33, 20, 14, 11, 9, 7, ) angle=(0, 0, 0, 0, 0, 0, 0, )
New "Spectrum.defaultload" NumHarm=7 harmonic=(1, 3, 5, 7, 9, 11, 13, ) %mag=(100, 1.5, 20, 14, 1, 9, 7, ) angle=(0, 180, 180, 180, 180, 180, 180, )
New "Spectrum.defaultgen" NumHarm=7 harmonic=(1, 3, 5, 7, 9, 11, 13, ) %mag=(100, 5, 3, 1.5, 1, 0.7, 0.5, ) angle=(0, 0, 0, 0, 0, 0, 0, )
New "Spectrum.defaultvsource" NumHarm=1 harmonic=(1, ) %mag=(100, ) angle=(0, )
New "Spectrum.linear" NumHarm=1 harmonic=(1, ) %mag=(100, ) angle=(0, )
New "Spectrum.pwm6" NumHarm=13 harmonic=(1, 3, 5, 7, 9, 11, 13, 15, 17, 19, 21, 23, 25, ) %mag=(100, 4.4, 76.5, 62.7, 2.9, 24.8, 12.7, 0.5, 7.1, 8.4, 0.9, 4.4, 3.3, ) angle=(-103, -5, 28, -180, -33, -59, 79, 36, -253, -124, 3, -30, 86, )
New "Spectrum.dc6" NumHarm=10 harmonic=(1, 3, 5, 7, 9, 11, 13, 15, 17, 19, ) %mag=(100, 1.2, 33.6, 1.6, 0.4, 8.7, 1.2, 0.3, 4.5, 1.3, ) angle=(-75, 28, 156, 29, -91, 49, 54, 148, -57, -46, )
New "Spectrum.inverter1" NumHarm=10 harmonic=(1, 3, 5, 7, 9, 11, 13, 15, 17, 19, ) %mag=(100, 4.62, 1.45, 0.73, 0.64, 0.49, 0.42, 0.21, 0.17, 0.36, ) angle=(0, 166.74, 149.14, 160.42, 159.21, 160.58, 158.89, 159.2, 148.18, 150.85, )
New "Spectrum.scenario3ideal" NumHarm=4 harmonic=(1, 3, 5, 1, ) %mag=(100, 2.374, 0.574, 0.24, ) angle=(0, 116.582, 89.85, 93.631, )
New "Spectrum.scenario3real" NumHarm=4 harmonic=(1, 3, 5, 1, ) %mag=(100, 4.99, 1.84, 0.44, ) angle=(0, 137.973, 39.654, -118.958, )
