New "Transformer.xfmr_0" windings=2 buses=[sourcebus.1.2.3, substation_bus.1.2.3, ] conns=[delta, wye, ] kVs=[69, 12.47, ] kVAs=[1000, 1000, ] taps=[1, 1, ] buses=[sourcebus.1.2.3, substation_bus.1.2.3, ] conns=[delta, wye, ] kVs=[69, 12.47, ] kVAs=[1000, 1000, ] taps=[1, 1, ] wdg=1 %R=0.2 RdcOhms=8.0937 wdg=2 %R=0.2 RdcOhms=0.08811718 RdcOhms=0.08811718
New "Transformer.xfmr_2" phases=1 windings=2 buses=[dist_tx_bus.1, load_bus.1, ] conns=[wye, wye, ] kVs=[12.47, 0.24, ] kVAs=[1000, 1000, ] taps=[1, 1, ] buses=[dist_tx_bus.1, load_bus.1, ] conns=[wye, wye, ] kVs=[12.47, 0.24, ] kVAs=[1000, 1000, ] taps=[1, 1, ] wdg=1 %R=0.2 RdcOhms=0.2643515 wdg=2 %R=0.2 RdcOhms=9.792E-005 RdcOhms=9.792E-005
